// SBML level 3 version 2

model mm_two_paths_model()

  // Compartments:
  compartment default = 1;

  // Species:
  substanceOnly species __s0 in default = Etot; __s0 is "E(s=None)";
  substanceOnly species __s1 in default = S1_0; __s1 is "S(e=None, type='A')";
  substanceOnly species __s2 in default = S2_0; __s2 is "S(e=None, type='B')";
  substanceOnly species __s3 in default = 0; __s3 is "E(s=1) ._br_S(e=1, type='A')";
  substanceOnly species __s4 in default = 0; __s4 is "E(s=1) ._br_S(e=1, type='B')";
  substanceOnly species __s5 in default = 0; __s5 is "P()";

  // Parameters:
  kf1 = 0.1;
  kr1 = 10;
  kcat1 = 100;
  kf2 = 0.1;
  kr2 = 1000;
  kcat2 = 10;
  Etot = 10;
  S1_0 = 100;
  S2_0 = 100;
  var __obs0; __obs0 is "E_free";
  var __obs1; __obs1 is "S1_free";
  var __obs2; __obs2 is "S2_free";
  var __obs3; __obs3 is "ES1_complex";
  var __obs4; __obs4 is "ES2_complex";
  var __obs5; __obs5 is "Product";

  // Assignment rules:
  __obs0 := __s0;
  __obs1 := __s1;
  __obs2 := __s2;
  __obs3 := __s3;
  __obs4 := __s4;
  __obs5 := __s5;

  // Reactions:
  ReversibleBinding_1: __s0 + __s1 -> __s3; __s0*__s1*kf1 - __s3*kr1;
  ReversibleBinding_2: __s0 + __s2 -> __s4; __s0*__s2*kf2 - __s4*kr2;
  Production_1: __s3 => __s0 + __s5; __s3*kcat1;
  Production_2: __s4 => __s0 + __s5; __s4*kcat2;
end
